// COMSOL Multiphysics 5.4.0.225 model "model.mph"
// Outline of the model tree

Parameters
  logKr = -4.3
  logSr = -4

Functions
  int1: Interpolation | funcs = {logK, 1}; source = file
  int2: Interpolation (disabled) | funcs = {logS, 1}; source = file

Geometry
  geom1 "Geometry 1" (2D, length unit m)
    r1: Rectangle | pos = {-0.5, -0.5}; size = {1, 1}
    r2: Rectangle | pos = {-5, -5}; size = {10, 10}
    fin: Finalize "Form Union"

Materials
  mat1: Common "Water" on all domains
    def "Basic"
      thermalexpansioncoefficient = alpha_p(T)
      bulkviscosity = muB(T)
      dynamicviscosity = eta(T)
      ratioofspecificheat = gamma_w(T)
      electricconductivity = 5.5e-6[S/m]
      heatcapacity = Cp(T)
      density = rho(T)
      thermalconductivity = k(T)
      soundspeed = cs(T)
      eta: Piecewise
        arg = T
        pieces = 
          {273.15, 413.15, 1.3799566804-0.021224019151*T^1+1.3604562827E-4*T^2-4.6454090319E-7*T^3+8.9042735735E-10*T^4-9.0790692686E-13*T^5+3.8457331488E-16*T^6}
          {413.15, 553.75, 0.00401235783-2.10746715E-5*T^1+3.85772275E-8*T^2-2.39730284E-11*T^3}
        argunit = K
        fununit = Pa*s
      Cp: Piecewise | arg = T; pieces = {273.15, 553.75, 12010.1471-80.4072879*T^1+0.309866854*T^2-5.38186884E-4*T^3+3.62536437E-7*T^4}; argunit = K; fununit = J/(kg*K)
      rho: Piecewise
        arg = T
        smooth = contd1
        pieces = 
          {273.15, 293.15, 6.3092789034e-05*T^3-0.0603676398829*T^2+18.9229382407066*T-950.704055329848}
          {293.15, 373.15, 1.0335053319e-05*T^3-0.0133950656345*T^2+4.96928883266*T+432.257114008512}
        argunit = K
        fununit = kg/m^3
      k: Piecewise | arg = T; pieces = {273.15, 553.75, -0.869083936+0.00894880345*T^1-1.58366345E-5*T^2+7.97543259E-9*T^3}; argunit = K; fununit = W/(m*K)
      cs: Interpolation | table = {{273, 1403}, {278, 1427}, {283, 1447}, {293, 1481}, {303, 1507}, {313, 1526}, {323, 1541}, {333, 1552}, {343, 1555}, {353, 1555}, {363, 1550}, {373, 1543}}; interp = piecewisecubic; argunit = K; fununit = m/s
      an1: Analytic | funcname = alpha_p; expr = -1/rho(T)*d(rho(T),T); args = T; argunit = K; fununit = 1/K
      an2: Analytic | funcname = gamma_w; expr = 1+(T/Cp(T))*(alpha_p(T)*cs(T))^2; args = T; argunit = K; fununit = 1
      an3: Analytic | funcname = muB; expr = 2.79*eta(T); args = T; argunit = K; fununit = Pa*s

Physics
  dl: DarcysLaw on all domains
    dependent variable p
    dlm1: DarcysLawModel "Fluid and Matrix Properties 1" (default)
    nf1: NoFlow (default)
    init1: init "Initial Values 1" (default) | InitType = H
    hh1: HydraulicHead on boundaries 1-3, 8
    smm1: StorageModel on domains 1 | ktype = conductivity; K = 10^logKr; Storage = userdef; S = 10^logSr/9804
    smm2: StorageModel on domains 2 | ktype = conductivity; K = 10^logK(x,y); Storage = userdef; S = 10^logS(x,y)/9804
    well1: Well on points 3 | injectionProduction = Production; wellInputType = MassFlow; M0 = 1.92

Mesh
  mesh1 "Mesh 1"
    size: MeshSizeDefault | hmax = 0.67; hmin = 0.003; hcurve = 0.3; hgrad = 1.3
    ftri1: FreeTri "Free Triangular 1" on remaining entities
      size1: Size on points 3 | hmax = 0.2; custom = on

Studies
  std1 "Study 1"
    time: Transient "Time Dependent" | tlist = range(0,5,2000)

Solver configurations
  sol1 "Solution 1" (study std1)
    v1: Variables "Dependent Variables 1"
    t1: Time "Time-Dependent Solver 1" | tlist = range(0,5,2000)
      dDef: Direct
      fc1: FullyCoupled

Datasets
  dset1: Solution | solution = sol1

Derived values
  pev1: EvalPoint "Point Evaluation 1" | data = none